**
** ABAQUS Input Deck Generated by HyperMesh Version  : 11.0.0.39
** Generated using HyperMesh-Abaqus Template Version : 11.0.0.39
**
**   Template:  ABAQUS/STANDARD 2D
**
*NODE
         1,  0.0            ,  0.0
         2,  10.0           ,  0.0
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**HM_UNSUPPORTED_CARDS_MIDDLE
*User element, nodes=3, type=U1, properties=3, coordinates=2, variables=7
1,2
*Element, type=U1, Elset=COMP, INPUT = U1_Nodes.dat
*User element, nodes=4, type=U2, properties=3, coordinates=2, variables=7
1,2
*Element, type=U2, Elset=COMP, INPUT = U2_Nodes.dat
*User element, nodes=5, type=U3, properties=3, coordinates=2, variables=7
1,2
*Element, type=U3, Elset=COMP, INPUT = U3_Nodes.dat
*User element, nodes=7, type=U5, properties=3, coordinates=2, variables=7
1,2
*Element, type=U5, Elset=COMP, INPUT = U5_Nodes.dat
**HWCOLOR COMP          1     3
*ELEMENT,TYPE=CPE3,ELSET=BEAM
      2001,       266,       268,       262
      2002,       266,       262,       263
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**HM_comp_by_property "BEAM_PROP"     3
*SOLID SECTION, ELSET=BEAM, MATERIAL=BEAM_MAT
*NSET, NSET=BCs
         1,         4,         5,         6,         7,         8,         9,        10,
        11,        12,        13
*NSET, NSET=Load
         3,
*MATERIAL, NAME=BEAM_MAT
*HYPERELASTIC,NEO HOOKE
1.600E+08,	1.339E-09,
*UEL Property, Elset=COMP
1.,5.6E+09,0.4,0.4
**HMNAME LOADSTEP          1 Cant_load
*STEP, INC =         1000, NAME = Cant_load, NLGEOM = YES
Cant_load
*STATIC
0.1       ,1.0       ,1.0000E-06,1.0
**HWNAME LOADCOL          1 BCs
**HWCOLOR LOADCOL          1     3
*BOUNDARY
BCs,1,2,0.0
**HWNAME LOADCOL          2 Load
**HWCOLOR LOADCOL          2     4
*CLOAD
Load,2,-20000000.0
*OUTPUT, FIELD, VARIABLE = PRESELECT
*NODE OUTPUT, VARIABLE = PRESELECT
*ELEMENT OUTPUT, VARIABLE = PRESELECT
*END STEP
