**
** ABAQUS Input Deck Generated by HyperMesh Version  : 11.0.0.39
** Generated using HyperMesh-Abaqus Template Version : 11.0.0.39
**
**   Template:  ABAQUS/STANDARD 2D
**
*NODE
         1,  1.0            ,  1.0
         2,  9.0            ,  1.0
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**HWCOLOR COMP          1     4
*User element, nodes=3, type=U1, properties=3, coordinates=2, variables=7
1,2
*Element, type=U1, Elset=COMP
1,1,82,83
3,86,3,87
*User element, nodes=4, type=U2, properties=3, coordinates=2, variables=7
1,2
*Element, type=U2, Elset=COMP
2,84,2,247,85
4,88,289,4,89
*User element, nodes=5, type=U3, properties=3, coordinates=2, variables=7
1,2
*Element, type=U3, Elset=COMP
5,90,5,231,92,91
6,93,241,6,95,94
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*User element, nodes=7, type=U5, properties=3, coordinates=2, variables=7
1,2
*Element, type=U5, Elset=COMP
9,102,9,103,257,104,105,279
18,130,18,132,235,131,245,133
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*UEL Property, Elset=COMP
1.,10000000.0       ,0.3, 0.7071
**HWCOLOR COMP          1     4
*ELEMENT,TYPE=CPS3,ELSET=Elastic_body
       401,        83,       229,        27
       402,       229,       163,        27
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**HWCOLOR COMP          2     3
*ELEMENT,TYPE=CPS4,ELSET=Rigid_body
       913,       514,       513,       506,       505
       914,       513,       514,       511,       512
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**HM_comp_by_property "PROP"     3
*SOLID SECTION, ELSET=Elastic_body, MATERIAL=MAT
**HM_comp_by_property "PROP"     3
*SOLID SECTION, ELSET=Rigid_body, MATERIAL=MAT1
**HM_Rigid_Body "PROP_Rigid"          3
*RIGID BODY, REF NODE =        516, ELSET = Rigid_body
*NSET, NSET=BCs
       501,       502,       506,       507,       509,       512,       513,       516,
       517,       520,       522
*NSET, NSET=Symm_BCs
         5,         8,         9,        18,        21,        36
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*MATERIAL, NAME=MAT
*HYPERELASTIC,NEO HOOKE,MODULI = INSTANTANEOUS
9.62E+05, 4.80E-07,
*MATERIAL, NAME=MAT1
*ELASTIC, TYPE = ISOTROPIC
1.0000E+60,0.3      ,0.0
*SURFACE INTERACTION, NAME = Friction
*FRICTION, LAGRANGE
0.0       ,0.0       ,0.0       ,0.0
**HMNAME GROUPS          1 CP
*CONTACT PAIR, INTERACTION=Friction, ADJUST=0.001, TYPE=SURFACE TO SURFACE, SMALL SLIDING
S, M
*SURFACE, NAME = M, TYPE = ELEMENT
**HMNAME CONTACTSURF  M,       3
     917, S2
     919, S4
     915, S4
     920, S2
     913, S4
     916, S2
     914, S2
     921, S4
*SURFACE, NAME = S, TYPE = ELEMENT
**HMNAME CONTACTSURF  S,       4
     407, S1
     571, S1
     443, S1
     529, S1
     413, S1
     433, S1
     561, S1
     539, S1
     405, S1
     415, S1
     569, S1
     563, S1
     441, S1
     435, S1
     531, S1
     537, S1
**HMNAME LOADSTEP          1 Static
*STEP, NAME = Static, NLGEOM = YES
Static
*STATIC
1.0       ,1.0       ,1.0000E-05,1.0
**HWNAME LOADCOL          1 BCs
**HWCOLOR LOADCOL          1     4
*BOUNDARY
BCs,1,2,0.0
Symm_BCs,1, ,0.0
**HWNAME LOADCOL          2 Load
**HWCOLOR LOADCOL          2     3
*CLOAD
       128,2,-470588.235
       127,2,-470588.235
       122,2,-470588.235
       121,2,-470588.235
       100,2,-470588.235
        99,2,-470588.235
        89,2,-470588.235
        87,2,-470588.235
        44,2,-470588.235
        43,2,-470588.235
        33,2,-470588.235
        31,2,-470588.235
        17,2,-470588.235
        15,2,-470588.235
         8,2,-470588.235
         4,2,-470588.235
         3,2,-470588.235
*OUTPUT, FIELD
*NODE OUTPUT
U,
RF,
CF,
TF,
*ELEMENT OUTPUT
S,
E,
EP,
PE,
*CONTACT OUTPUT
CSTRESS,
CDISP,
*END STEP
