**
** ABAQUS Input Deck Generated by HyperMesh Version  : 11.0.0.39
** Generated using HyperMesh-Abaqus Template Version : 11.0.0.39
**
**   Template:  ABAQUS/STANDARD 2D
**
*NODE
         1,  -3.55271368E-15,  35.0
         2,  0.0            ,  31.111111111111
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**HWCOLOR COMP          1     4
*ELEMENT,TYPE=CPS3,ELSET=Geom
      1601,       203,         9,        11
      1602,         9,        10,        11
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**HWCOLOR COMP          2     3
*ELEMENT,TYPE=CPS4I,ELSET=Rigid
      4373,      1620,      1619,      1617,      1605
      4374,      1603,      1625,      1616,      1632
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**HM_comp_by_property "Gasket_prop"     3
*SOLID SECTION, ELSET=Geom, MATERIAL=MAT
**HM_comp_by_property "Rigid_prop"     4
*SOLID SECTION, ELSET=Rigid, MATERIAL=Rigid_MAT
*NSET, NSET=BCs
         1,         2,         3,         4,         5,         6
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*NSET, NSET=Disp_nods
      1601,      1602,      1603,      1604,      1605,      1606
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*MATERIAL, NAME=MAT
*HYPERELASTIC,NEO HOOKE,MODULI = INSTANTANEOUS
3.92E-02,	4.08E-01,
*MATERIAL, NAME=Rigid_MAT
*ELASTIC, TYPE = ISOTROPIC
1.0000E+20,0.3       ,0.0
**HM_UNSUPPORTED_CARDS_MIDDLE
*User element, nodes=3, type=U1, properties=3, coordinates=2, variables=7
1,2
*Element, type=U1, Elset=COMP
1,2,202,1
10,9,10,11
*User element, nodes=4, type=U2, properties=3, coordinates=2, variables=7
1,2
*Element, type=U2, Elset=COMP
26,25,26,407,27
48,1231,47,48,49
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*User element, nodes=5, type=U3, properties=3, coordinates=2, variables=7
1,2
*Element, type=U3, Elset=COMP
3,4,235,3,245,2
4,5,223,4,235,3
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*User element, nodes=6, type=U4, properties=3, coordinates=2, variables=7
1,2
*Element, type=U4, Elset=COMP
2,3,245,2,258,202,1
9,203,9,11,10,204,8
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*User element, nodes=7, type=U5, properties=3, coordinates=2, variables=7
1,2
*Element, type=U5, Elset=COMP
203,203,9,11,12,207,205,204
205,203,205,204,207,210,209,206
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*User element, nodes=8, type=U6, properties=3, coordinates=2, variables=7
1,2
*Element, type=U6, Elset=COMP
208,206,208,7,209,213,6,214,219
211,12,13,211,207,210,218,212,216
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*User element, nodes=9, type=U7, properties=3, coordinates=2, variables=7
1,2
*Element, type=U7, Elset=COMP
270,270,260,251,18,19,282,275,286,287
654,168,631,654,167,661,653,679,694,684
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*UEL Property, Elset=COMP
1.,0.4774536, 0.492,0.707
*SURFACE INTERACTION, NAME = Friction
1.0       ,
*FRICTION
0.05      ,0.0       ,0.0       ,0.0
**HMNAME GROUPS          1 CP
*CONTACT PAIR, INTERACTION=Friction, TYPE=SURFACE TO SURFACE
S2, M2
**HMNAME GROUPS          7 CP1
*CONTACT PAIR, INTERACTION=Friction, TYPE=SURFACE TO SURFACE
S3, M3
*SURFACE, NAME = M2, TYPE = ELEMENT
**HMNAME CONTACTSURF  M2,       4
    4379, S1
    4376, S1
    4374, S1
    4383, S1
    4380, S1
    4373, S1
    4378, S1
    4375, S1
    4377, S1
    4382, S1
    4381, S1
*SURFACE, NAME = S1, TYPE = ELEMENT
**HMNAME CONTACTSURF  S1,       3
    4174, S2
    4154, S3
    4139, S1
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    2335, S1
*SURFACE, NAME = S2, TYPE = ELEMENT
**HMNAME CONTACTSURF  S2,       6
    3784, S3
    3830, S3
    3858, S3
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    3550, S2
*SURFACE, NAME = S3, TYPE = ELEMENT
**HMNAME CONTACTSURF  S3,       5
    4371, S1
    4369, S1
    4367, S1
    4363, S1
    4359, S1
    4356, S3
    4345, S1
    4341, S1
    4329, S1
    4317, S1
    4297, S3
    4281, S3
    4265, S3
    4246, S1
    4223, S1
    4204, S3
*SURFACE, NAME = M3, TYPE = ELEMENT
**HMNAME CONTACTSURF  M3,       5
    4385, S1
    4386, S1
    4387, S1
    4384, S1
*CONTACT
*CONTACT INCLUSIONS
S1, S1
**HMNAME LOADSTEP          1 Disp_load
*STEP, INC =          500, NAME = Disp_load, NLGEOM = YES
Disp_load
*STATIC
1.0000E-01,1.0       ,          ,
**HWNAME LOADCOL          1 BCs
**HWCOLOR LOADCOL          1     3
*BOUNDARY
BCs,1,2,0.0
Disp_nods,1, ,0.0
Disp_nods,2, ,-30.0
*CONTACT CONTROLS, AUTOMATIC TOLERANCES
*CONTROLS, ANALYSIS = DISCONTINUOUS
*OUTPUT, FIELD, VARIABLE = PRESELECT
*NODE OUTPUT, VARIABLE = PRESELECT
*ELEMENT OUTPUT, VARIABLE = PRESELECT
*CONTACT OUTPUT, VARIABLE = PRESELECT
*END STEP
