**
** ABAQUS Input Deck Generated by HyperMesh Version  : 11.0.0.39
** Generated using HyperMesh-Abaqus Template Version : 11.0.0.39
**
**   Template:  ABAQUS/STANDARD 2D
**
*NODE
         2,  150.0          ,  90.0
         3,  0.0            ,  90.0
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**HWCOLOR COMP          1     4
*ELEMENT,TYPE=CPE4R,ELSET=Geom
      2787,      2546,       568,      2551,      4740
      2786,       550,      2546,      4740,      2519
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**HWCOLOR COMP          2     3
*ELEMENT,TYPE=CPE4R,ELSET=Rigid
      6946,     17242,     17246,     17238,     17239
      6947,     17246,     17076,     17077,     17238
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**HM_comp_by_property "Gasket_prop"     3
*SOLID SECTION, ELSET=Geom, MATERIAL=MAT
**HM_comp_by_property "Rigid_prop"     4
*SOLID SECTION, ELSET=Rigid, MATERIAL=Rigid_MAT
*NSET, NSET=BCs
        33,        34,        35,        36,        37,        38
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*NSET, NSET=Disp_nods
         2,         3,        29,        32,     17070,     17071
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*MATERIAL, NAME=MAT
*HYPERELASTIC,NEO HOOKE,MODULI = INSTANTANEOUS
0.08, 0.2,
*MATERIAL, NAME=Rigid_MAT
*ELASTIC, TYPE = ISOTROPIC
1.0000E+20,0.3       ,0.0
*SURFACE INTERACTION, NAME = Friction
1.0       ,
*FRICTION
0.05      ,0.0       ,0.0       ,0.0
**HMNAME GROUPS          1 CP
*CONTACT PAIR, INTERACTION=Friction, TYPE=SURFACE TO SURFACE
S2,M2
**HMNAME GROUPS          2 CP1
*CONTACT PAIR, INTERACTION=Friction, TYPE=SURFACE TO SURFACE
S3,M2
*SURFACE, NAME = M2, TYPE = ELEMENT
**HMNAME CONTACTSURF  M2,       5
    6960, S4
    7307, S4
    7195, S4
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    7192, S4
*SURFACE, NAME = S1, TYPE = ELEMENT
**HMNAME CONTACTSURF  S1,       3
    2927, S1
    2870, S1
    2871, S1
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    5766, S4
*SURFACE, NAME = S2, TYPE = ELEMENT
**HMNAME CONTACTSURF  S2,       4
    5861, S4
    5858, S4
    5917, S4
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    2926, S1
*SURFACE, NAME = S3, TYPE = ELEMENT
**HMNAME CONTACTSURF  S3,       5
    6942, S1
    6943, S1
    6938, S1
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    6421, S4
*CONTACT
*CONTACT INCLUSIONS
S1, S1
**HMNAME LOADSTEP          1 Disp_load
*STEP, INC =          500, NAME = Disp_load, NLGEOM = YES
Disp_load
*STATIC
1.0000E-05,1.0       ,          ,
**HWNAME LOADCOL          1 BCs
**HWCOLOR LOADCOL          1     3
*BOUNDARY
BCs,1,2,0.0
Disp_nods,1, ,0.0
Disp_nods,2, ,-30.0
*OUTPUT, FIELD, VARIABLE = PRESELECT, NUMBER INTERVAL = 200
*NODE OUTPUT, VARIABLE = PRESELECT
*ELEMENT OUTPUT, VARIABLE = PRESELECT
*CONTACT OUTPUT, VARIABLE = PRESELECT
*END STEP
