**
** ABAQUS Input Deck Generated by HyperMesh Version  : 11.0.0.39
** Generated using HyperMesh-Abaqus Template Version : 11.0.0.39
**
**   Template:  ABAQUS/STANDARD 2D
**
*NODE
         1,  0.0            ,  0.0
         2,  0.0            ,  1.0
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**HWCOLOR COMP          1     4
*User element, nodes=3, type=U1, properties=3, coordinates=2, variables=7
1,2
*Element, type=U1, Elset=COMP
1,21,1,22
101,102,100,101
*User element, nodes=4, type=U2, properties=3, coordinates=2, variables=7
1,2
*Element, type=U2, Elset=COMP
2,2,3,423,160
81,1085,80,81,82
*User element, nodes=5, type=U3, properties=3, coordinates=2, variables=7
1,2
*Element, type=U3, Elset=COMP
3,2,3,423,424,4
4,415,424,4,5,3
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*User element, nodes=7, type=U5, properties=3, coordinates=2, variables=7
1,2
*Element, type=U5, Elset=COMP
161,530,534,161,162,51,871,52
162,530,161,162,539,163,871,868
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*UEL Property, Elset=COMP
1.,1.0, 0.3,0.3
**HWCOLOR COMP          1     4
*ELEMENT,TYPE=CPE3,ELSET=SLAB
      1661,       232,       234,       228
      1662,       232,       228,       229
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**HWCOLOR COMP          2     3
*ELEMENT,TYPE=CPE4I,ELSET=DIE
      1501,      2883,      2884,      2879,      2880
      1502,      2884,      2876,      2877,      2879
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**HM_comp_by_property "SLAB_PROP"     3
*SOLID SECTION, ELSET=SLAB, MATERIAL=SLAB_MAT
**HM_comp_by_property "DIE_PROP"     3
*SOLID SECTION, ELSET=DIE, MATERIAL=DIE_MAT
*NSET, NSET=BCs
         1,        22,        23,        24,        25,        26
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*NSET, NSET=Disp_nodes
      2782,      2783,      2784,      2785,      2786,      2787
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*MATERIAL, NAME=DIE_MAT
*HYPERELASTIC,NEO HOOKE
1.9230769231E+02, 2.40E-03,
*MATERIAL, NAME=SLAB_MAT
*HYPERELASTIC,NEO HOOKE
1.730769E-02, 26.667,
*SURFACE INTERACTION, NAME = FRIC
*SURFACE BEHAVIOR, PRESSURE-OVERCLOSURE = HARD, PENALTY = LINEAR
100.0      ,0.0        ,1.0
*FRICTION
0.3       ,0.0       ,0.0       ,0.0
**HMNAME GROUPS          1 CP
*CONTACT PAIR, INTERACTION=FRIC, TYPE=SURFACE TO SURFACE
DIE_M,SLAB_S
*SURFACE, NAME = DIE_M, TYPE = ELEMENT
**HMNAME CONTACTSURF  M,       4
    1524, S1
    1548, S1
    1549, S1
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    1628, S1
*SURFACE, NAME = SLAB_S, TYPE = ELEMENT
**HMNAME CONTACTSURF  S,       5
    3810, S3
    3808, S3
    3822, S3
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    2118, S3
**HMNAME LOADSTEP          1 Vert_disp
*STEP, NAME = Vert_disp, NLGEOM = YES
Vert_disp
*STATIC
0.01      ,1.0       ,          ,1.0
**HWNAME LOADCOL          1 BCs
**HWCOLOR LOADCOL          1     3
*BOUNDARY, FIXED
BCs,1,2,0.0
**HWNAME LOADCOL          2 Vert_disp
**HWCOLOR LOADCOL          2     4
*BOUNDARY
Disp_nodes,2, ,-0.075
*CONTACT CONTROLS, AUTOMATIC TOLERANCES, STABILIZE = 0.001
*NODE PRINT, NSET = BCs
RF,
*OUTPUT, FIELD, NUMBER INTERVAL = 10
*NODE OUTPUT, VARIABLE = PRESELECT
*ELEMENT OUTPUT, VARIABLE = PRESELECT
*CONTACT OUTPUT, VARIABLE = PRESELECT
*END STEP
**HMNAME LOADSTEP          2 Hor_disp
*STEP, INC =        10000, NAME = Hor_disp, NLGEOM = YES
Vert_disp
*STATIC
0.005     ,1.0       ,          ,1.0
**HWNAME LOADCOL          3 BCs:1
**HWCOLOR LOADCOL          3     3
*BOUNDARY, FIXED
BCs,1,2,0.0
**HWNAME LOADCOL          4 Hor_disp
**HWCOLOR LOADCOL          4     3
*BOUNDARY
Disp_nodes,1, ,2.0
*NODE PRINT, NSET = BCs
RF,
*OUTPUT, FIELD, NUMBER INTERVAL = 140
*NODE OUTPUT, VARIABLE = PRESELECT
*ELEMENT OUTPUT, VARIABLE = PRESELECT
*CONTACT OUTPUT, VARIABLE = PRESELECT
*END STEP
