**
** ABAQUS Input Deck Generated by HyperMesh Version  : 11.0.0.39
** Generated using HyperMesh-Abaqus Template Version : 11.0.0.39
**
**   Template:  ABAQUS/STANDARD 2D
**
*NODE
         1,  0.5            ,  4.163336342E-17
         2,  0.5            ,  0.5
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**HWCOLOR COMP          1     4
*User element, nodes=3, type=U1, properties=3, coordinates=2, variables=7
1,2
*Element, type=U1, Elset=COMP
2,1750,2,1749
354,3072,354,3073
379,3153,379,3152
*User element, nodes=4, type=U2, properties=3, coordinates=2, variables=7
1,2
*Element, type=U2, Elset=COMP
59,1972,1974,59,1973
126,6372,2215,126,2214
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*User element, nodes=5, type=U3, properties=3, coordinates=2, variables=7
1,2
*Element, type=U3, Elset=COMP
1,5655,1748,1,1747,1746
55,1962,55,1960,6184,1961
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*User element, nodes=6, type=U4, properties=3, coordinates=2, variables=7
1,2
*Element, type=U4, Elset=COMP
54,54,1959,1956,1957,1955,1958
110,110,2156,2154,2155,2153,6687
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*User element, nodes=7, type=U5, properties=3, coordinates=2, variables=7
1,2
*Element, type=U5, Elset=COMP
3,3,1753,6370,1752,1754,1751,6404
4,4,1756,6378,1757,1758,1755,6412
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*User element, nodes=8, type=U6, properties=3, coordinates=2, variables=7
1,2
*Element, type=U6, Elset=COMP
152,152,2299,6690,2298,2297,6697,2300,6716
235,235,2629,6042,2627,2630,6075,2628,6357
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*UEL Property, Elset=COMP
1.,7.031, 0.40625, 0.4
**HWCOLOR COMP          1     3
*ELEMENT,TYPE=CPE3,ELSET=Inclusion
     50001,     52729,     50735,     51889
     50002,     52729,     51889,     52829
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**HWCOLOR COMP          2     4
*ELEMENT,TYPE=CPE3,ELSET=MATRIX
     57105,      4925,      1507,      5232
     57106,      1507,      4918,      5232
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**HM_comp_by_property "MATRIX_PROP"     3
*SOLID SECTION, ELSET=MATRIX, MATERIAL=Matrix_mat
**HM_comp_by_property "Inclusion_PROP"     3
*SOLID SECTION, ELSET=Inclusion, MATERIAL=Inclusion_mat
*NSET, NSET=BCs_Y
       239,       299,       306,       307,       308,       309
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*NSET, NSET=BCs_X
        55,        56,        57,        58,        59,        60
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*NSET, NSET=Disp_nodes
         2,        62,        69,        70,        71,        72
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*NSET, NSET=A1_nodes
         1,         2,         3,         4,         5,         6
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*NSET, NSET=A2_nodes
         1,         2,         3,         4,         5,         6
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*NSET, NSET=A3_nodes
         1,         2,         3,         4,         5,         6
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*MATERIAL, NAME=Inclusion_mat
*HYPERELASTIC,NEO HOOKE
125.0, 0.0016,
*MATERIAL, NAME=Matrix_mat
*HYPERELASTIC,NEO HOOKE
0.2, 1.0,
**HMNAME LOADSTEP          1 Disp_load
*STEP, NAME = Disp_load, NLGEOM = YES
Disp_load
*STATIC
**HWNAME LOADCOL          1 BCs
**HWCOLOR LOADCOL          1     3
*BOUNDARY
BCs_Y,2, ,0.0
BCs_X,1, ,0.0
Disp_nodes,2, ,-0.15
*NODE PRINT, NSET = A3_nodes
U,
*OUTPUT, FIELD, NUMBER INTERVAL = 5
*NODE OUTPUT, VARIABLE = PRESELECT
*ELEMENT OUTPUT, VARIABLE = PRESELECT
*END STEP
