**
** ABAQUS Input Deck Generated by HyperMesh Version  : 11.0.0.39
** Generated using HyperMesh-Abaqus Template Version : 11.0.0.39
**
**   Template:  ABAQUS/STANDARD 2D
**
*NODE
         1,  0.0580704438714,  0.4035787935528
         2,  0.05830308619  ,  0.430744664371
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**HWCOLOR COMP          1     4
*User element, nodes=3, type=U1, properties=3, coordinates=2, variables=7
1,2
*Element, type=U1, Elset=COMP
1420,1329,1420,1368
2046,1930,2046,2045
2719,2718,2719,2720
*User element, nodes=4, type=U2, properties=3, coordinates=2, variables=7
1,2
*Element, type=U2, Elset=COMP
242,604,242,670,664
248,131,248,669,670
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*User element, nodes=5, type=U3, properties=3, coordinates=2, variables=7
1,2
*Element, type=U3, Elset=COMP
243,605,243,126,664,665
244,606,244,40,665,666
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*User element, nodes=6, type=U4, properties=3, coordinates=2, variables=7
1,2
*Element, type=U4, Elset=COMP
5,568,5,23,569,582,99
9,527,9,565,53,564,124
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*User element, nodes=7, type=U5, properties=3, coordinates=2, variables=7
1,2
*Element, type=U5, Elset=COMP
1,572,1,19,573,555,586,108
2,571,2,553,20,572,585,107
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*User element, nodes=8, type=U6, properties=3, coordinates=2, variables=7
1,2
*Element, type=U6, Elset=COMP
12,530,12,51,562,91,237,659,238
23,544,23,551,29,550,568,5,569
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*User element, nodes=9, type=U7, properties=3, coordinates=2, variables=7
1,2
*Element, type=U7, Elset=COMP
131,125,131,44,538,539,42,248,669,670
321,310,321,715,719,325,320,721,324,720
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*UEL Property, Elset=COMP
1.,7.031, 0.40625, 0.4
**HWCOLOR COMP          2     3
*ELEMENT,TYPE=CPE3,ELSET=Inclusions
     12447,     12762,      2754,      2753
     12452,     12758,      2749,      2776
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**HWCOLOR COMP          1     4
*ELEMENT,TYPE=CPE3,ELSET=Matrix
      7025,      2196,      2195,      2202
      7369,       540,        41,       631
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**HWCOLOR COMP          2     3
*ELEMENT,TYPE=CPE4,ELSET=Inclusions
     12351,      2829,      2828,     12843,     12844
     12352,     12843,      2828,      2827,     12842
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**HM_comp_by_property "Matrix_prop"     3
*SOLID SECTION, ELSET=Matrix, MATERIAL=Matrix
**HM_comp_by_property "Inclusion_prop"     4
*SOLID SECTION, ELSET=Inclusions, MATERIAL=Inclusion
*NSET, NSET=BCs
      1329,      1330,      1331,      1332,      1333,      1334
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*NSET, NSET=Disp_loads
      2230,      2231,      2232,      2233,      2234,      2235
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*MATERIAL, NAME=Inclusion
*HYPERELASTIC,NEO HOOKE
125, 0.0016,
*MATERIAL, NAME=Matrix
*HYPERELASTIC,NEO HOOKE
0.2, 1.0,
**HMNAME LOADSTEP          1 Disp_load
*STEP, INC =         1000, NAME = Disp_load, NLGEOM = YES
Disp_load
*STATIC
1.0000E-03,1.0       ,          ,
**HWNAME LOADCOL          1 BCs
**HWCOLOR LOADCOL          1     3
*BOUNDARY
BCs,2, ,0.0
Disp_loads,2, ,-0.15
*OUTPUT, FIELD, VARIABLE = PRESELECT, TIME INTERVAL = 50.0
*NODE OUTPUT, VARIABLE = PRESELECT
*ELEMENT OUTPUT, VARIABLE = PRESELECT
*END STEP
